ORIGIN := 1
# Задаём численные значения элементов цепи
R1 := 380
R2 := 870
R3 := 120
R4 := 140
R5 := 530
R6 := 950
R7 := 730
E1 := 0
E2 := 0
E3 := 0
E4 := 600
E5 := 0
E6 := 0
E7 := 900
I01 := 0
I02 := 0
I03 := 6
I04 := 1
I05 := 0
I06 := 0
I07 := 0
# 7. Определение токов в ветвях исходной схемы методом законов Кирхгофа
# Записываем уравнения, описывющие цепь, в матричном виде
# Ах = В, где: А - квадратная матрица; В - матрица столбец правых частей; х - матрица столбец искомых токов.
R[1] := R1
R[2] := R2
R[3] := R3
R[4] := R4
R[5] := R5
R[6] := R6
R[7] := R7
J[01] := I01
J[03] := I03
J[05] := I05
J[07] := I07
J[02] := I02
J[04] := I04
J[06] := I06
A1 := [
    -1, 0, 0, 0, 0, 1, 0;
    1, -1, 0, 0, 0, 0, -1;
    0, 1, -1, 0, 0, 0, 0;
    0, 0, 1, -1, 0, 0, 0;
    0, 0, 0, 1, -1, 0, 1;
    R1, 0, 0, 0, R5, R6, R7;
    0, R2, R3, R4, 0, 0, -R7
]
B1 := [
    I01 - I06;
    -I01 + I02 + I07;
    -I02 + I03;
    -I03 + I04;
    -I04 + I05 - I07;
    E1 + E5 + E6 + E7;
    E2 + E3 + E4 - E7
]
E[1] := E1
E[3] := E3
E[5] := E5
E[7] := E7
E[2] := E2
E[4] := E4
E[6] := E6
# Выводим численные значения матриц
A1 = [
    -1, 0, 0, 0, 0, 1, 0;
    1, -1, 0, 0, 0, 0, -1;
    0, 1, -1, 0, 0, 0, 0;
    0, 0, 1, -1, 0, 0, 0;
    0, 0, 0, 1, -1, 0, 1;
    970, 0, 0, 0, 890, 890, 520;
    0, 790, 550, 990, 0, 0, -520
]
B1 = [1; -7; 0; 0; 0; 600; 500]
# Находим неизвестные токи умножая обратную матрицу А на матрицу В.
x := A1^-1*B1
# Выводим численные значения токов в виде вектора строки путём транспонирования х.
transpose(x) = [-2.96197, 0.912201, 0.912201, 0.912201, 4.03803, -1.96197, 3.12582]
# 8. Определение токов в ветвях исходной схемы методом контурных токов
# Выводим матрицы столбцы с целью проверки исходных данных
E = [600; 500; 0; 0; 0; 0; 0]
R = [970; 790; 550; 990; 890; 890; 520]
J = [7; 0; 0; 0; 0; 6; 0]
# Формируем диагональную матрицу RD из матрицы R
RD := diag(R)
# Выводим диагональную матрицу RD с целью проверки
RD = [
    970, 0, 0, 0, 0, 0, 0;
    0, 790, 0, 0, 0, 0, 0;
    0, 0, 550, 0, 0, 0, 0;
    0, 0, 0, 990, 0, 0, 0;
    0, 0, 0, 0, 890, 0, 0;
    0, 0, 0, 0, 0, 890, 0;
    0, 0, 0, 0, 0, 0, 520
]
# Формируем узловую матрицу А и контурную В
A := [
    -1, 0, 0, 0, 0, 1, 0;
    1, -1, 0, 0, 0, 0, -1;
    0, 1, -1, 0, 0, 0, 0;
    0, 0, 1, -1, 0, 0, 0;
    0, 0, 0, 1, -1, 0, 1
]
B := [1, 0, 0, 0, 1, 1, 1; 0, 1, 1, 1, 0, 0, -1]
# Находим контурные токи
Ik := (B*RD*transpose(B))^-1*(B*E + B*RD*J)
Ik = [4.03803; 0.912201]
# Определяем токи ветвей
I := transpose(B)*Ik
transpose(I) = [4.03803, 0.912201, 0.912201, 0.912201, 4.03803, 4.03803, 3.12582]
# Определяем токи в сопротивлениях ветвей
IR := I - J
transpose(IR) = [-2.96197, 0.912201, 0.912201, 0.912201, 4.03803, -1.96197, 3.12582]
# 9. Определение токов в ветвях исходной схемы методом узловых напряжений
# Формируем узловую матрицу А и контурную В
A := [
    -1, 0, 0, 0, 0, 1, 0;
    1, -1, 0, 0, 0, 0, -1;
    0, 1, -1, 0, 0, 0, 0;
    0, 0, 1, -1, 0, 0, 0;
    0, 0, 0, 1, -1, 0, 1
]
B := [1, 0, 0, 0, 1, 1, 1; 0, 1, 1, 1, 0, 0, -1]
# Формируем диагональную матрицу RD из матрицы R
RD := diag(R)
# Переформировываем матрицу RD в G
G := 1/RD
# Определяем потенциалы всех узлов по отношению к базисному узлу
F := (A*G*transpose(A))^-1*(-A*G*E - A*J)
F = [-1746.16; -5219.27; -4998.63; -4496.92; -3593.84]
# Определяем напряжение на всех ветвях цепи
U := transpose(A)*F
transpose(U) = [-3473.11, 220.639, 501.711, 903.079, 3593.84, -1746.16, 1625.43]
# Определяем токи в сопротивлениях ветвей
IR := G*(U + E)
transpose(IR) = [-2.96197, 0.912201, 0.912201, 0.912201, 4.03803, -1.96197, 3.12582]
